// SBML level 3 version 2
// Created with https://github.com/matthiaskoenig/sbmlutils.

model rivaroxaban_intestine(PODOSE_riv, Ka_dis_riv, Mr_riv, Vext, Vlumen, Vfeces, Vstomach, riv_ext, riv_lumen, riv_feces, rx_lumen, rx_feces)
  // Model for rivaroxaban absorption in the small intestine
  // Model for rivaroxaban absorption
  // The content of this model has been carefully created in a manual research effort.
  // Terms of use
  // Copyright © 2025 Elisabetta Casabianca.
  // This work is licensed under a Creative Commons Attribution 4.0 International License.
  // Redistribution and use of any part of this model, with or without modification, are permitted provided that the following conditions are met:
  // Redistributions of this SBML file must retain the above copyright notice, this list of conditions and the following disclaimer.
  // Redistributions in a different form must reproduce the above copyright notice, this list of conditions and the following disclaimer in the documentation and/or other materials provided with the distribution.
  // This model is distributed in the hope that it will be useful, but WITHOUT ANY WARRANTY; without even the implied warranty of MERCHANTABILITY or FITNESS FOR A PARTICULAR PURPOSE.
  // occursIn FMA:45615 BTO:0000545 ncit:C12736 FMA:7199 BTO:0000648
  // hasProperty ncit:C79369 ncit:C79372 mamo:MAMO_0000046 ncit:C77995 ncit:C180619 ncit:C15299
  // hasTaxon taxonomy:9606 snomedct:337915000
  // isDescribedBy doi:10.20944/preprints202507.1945.v1 doi:10.5281/zenodo.15157735
  // model units - substance: mmole, time: min, volume: litre, area: m2, length: metre, extent: mmole

  // Compartments:
  compartment Vext = 1 litre; Vext is "plasma";  // SBO:0000290 ncit:C13356 BTO:0000131
  compartment Vlumen = 1 litre;  // SBO:0000290 FMA:14586 UBERON:0018543
  compartment Vfeces = 1 litre;  // SBO:0000290 FMA:64183 ncit:C13234 BTO:0000440
  compartment Vstomach = 1 litre;  // SBO:0000290 FMA:7148 ncit:C12391 UBERON:0000945
  compartment Vapical = NaN; Vapical has m2; Vapical is "apical membrane (intestinal membrane enterocytes)";  // 2-D; SBO:0000290 FMA:84666 GO:0016324

  // Species:
  substanceOnly species $riv_stomach in Vstomach = 0; riv_stomach is "rivaroxaban (stomach)";  // SBO:0000247 CHEBI:68579 pubchem.compound:9875401 inchikey:KGFYHTZWPPHNLQ-AWEZNQCLSA-N
  species riv_ext in Vext = 0; riv_ext is "rivaroxaban (plasma)";  // SBO:0000247 CHEBI:68579 pubchem.compound:9875401 inchikey:KGFYHTZWPPHNLQ-AWEZNQCLSA-N
  species riv_lumen in Vlumen = 0; riv_lumen is "rivaroxaban (intestinal volume)";  // SBO:0000247 CHEBI:68579 pubchem.compound:9875401 inchikey:KGFYHTZWPPHNLQ-AWEZNQCLSA-N
  substanceOnly species riv_feces in Vfeces = 0; riv_feces is "rivaroxaban (feces)";  // SBO:0000247 CHEBI:68579 pubchem.compound:9875401 inchikey:KGFYHTZWPPHNLQ-AWEZNQCLSA-N
  species rx_lumen in Vlumen = 0; rx_lumen is "rivaroxaban metabolites (intestinal volume)";  // SBO:0000247
  substanceOnly species rx_feces in Vfeces = 0; rx_feces is "rivaroxaban metabolites (feces)";  // SBO:0000247

  // Parameters:
  // Fraction absorbed, i.e., only a fraction of the rivaroxaban in the intestinal lumen is absorbed. This parameter determines how much of the rivaroxaban is excreted.
  // F_riv_abs of dose is absorbed. (1-F_riv_abs) is excreted in feces.
  // ~12 % in feces and 6% unaccounted, total around 18 % applicant’s estimate of 80% to 100% appears.
  // assuming: 0.82 in fasted state assuming: 1.00 in fed state
  F_riv_abs = 0.82 dimensionless; F_riv_abs is "fraction absorbed rivaroxaban";  // SBO:0000002
  RIVABS_k = 0.05202785 per_min; RIVABS_k is "rate of rivaroxaban absorption";  // SBO:0000009
  // 1.0: normal absorption corresponding to tablet under fasting conditions.
  // allows to change the velocity of absorption
  f_absorption = 1 dimensionless; f_absorption is "scaling factor for absorption rate";  // SBO:0000009
  PODOSE_riv = 0 mg; PODOSE_riv is "oral dose rivaroxaban [mg]";  // SBO:0000002
  Ka_dis_riv = 0.15961 per_hr; Ka_dis_riv is "Ka_dis [1/hr] dissolution rivaroxaban";  // SBO:0000002
  Mr_riv = 435.88 g_per_mole; Mr_riv is "Molecular weight rivaroxaban [g/mole]";  // SBO:0000647
  RXEXC_k = 0.1 per_min; RXEXC_k is "rate of rivaroxaban metabolites excretion";  // SBO:0000009
  absorption_riv has mmole_per_min; absorption_riv is "absorption rivaroxaban";

  // Assignment rules:
  absorption_riv := f_absorption*RIVABS_k*Vlumen*riv_lumen;

  // Rate rules:
  PODOSE_riv' = -dissolution_riv*Mr_riv;

  // Reactions:
  RIVABS: riv_lumen => riv_ext; F_riv_abs*absorption_riv; RIVABS is "absorption rivaroxaban";  // SBO:0000655
  RIVEXC: riv_lumen => riv_feces; (1 - F_riv_abs)*absorption_riv; RIVEXC is "excretion rivaroxaban (feces)";  // SBO:0000655
  RXEXC: rx_lumen => rx_feces; f_absorption*RXEXC_k*Vlumen*rx_lumen; RXEXC is "excretion rivaroxaban metabolites (feces)";  // SBO:0000655
  // Swallowing, dissolution of tablet, and transport into intestine. Overall process describing the rates of this processes.
  dissolution_riv: $riv_stomach => riv_lumen; Ka_dis_riv/(60 min_per_hr)*PODOSE_riv/Mr_riv; dissolution_riv is "dissolution rivaroxaban";

  // Unit definitions:
  unit g_per_mole = gram / mole; g_per_mole is "g/mole";
  unit l_per_min = litre / (60 second); l_per_min is "l/min";
  unit m2 = metre^2; m2 is "meter^2";
  unit mM = 1e-3 mole / litre; mM is "mmole/liter";
  unit mg = 1e-3 gram;
  unit mg_per_min = 1e-3 gram / (60 second); mg_per_min is "mg/min";
  unit mg_per_s_l = 1e-3 gram / (second * litre); mg_per_s_l is "mg/s/l";
  unit min = 60 second;
  unit min_per_hr = 60 second / (3600 second); min_per_hr is "min/hour";
  unit mmole = 1e-3 mole;
  unit mmole_per_min = 1e-3 mole / (60 second); mmole_per_min is "mmole/min";
  unit mmole_per_min_l = 1e-3 mole / (60 second * litre); mmole_per_min_l is "mmole/min/l";
  unit per_hr = 1 / (3600 second); per_hr is "1/hr";
  unit per_min = 1 / (60 second); per_min is "1/min";
  unit per_mmole = 1 / (1e-3 mole); per_mmole is "1/mmole";
end
