// SBML level 3 version 2
// Created with https://github.com/matthiaskoenig/sbmlutils.

model rivaroxaban_liver(Vext, Vli, Vmem, Vbi, Vlumen, riv_ext, rx_ext, rx_lumen)
  // Model for hepatic rivaroxaban metabolism.
  // The content of this model has been carefully created in a manual research effort.
  // Terms of use
  // Copyright © 2026 Elisabetta Casabianca.
  // This work is licensed under a Creative Commons Attribution 4.0 International License.
  // Redistribution and use of any part of this model, with or without modification, are permitted provided that the following conditions are met:
  // Redistributions of this SBML file must retain the above copyright notice, this list of conditions and the following disclaimer.
  // Redistributions in a different form must reproduce the above copyright notice, this list of conditions and the following disclaimer in the documentation and/or other materials provided with the distribution.
  // This model is distributed in the hope that it will be useful, but WITHOUT ANY WARRANTY; without even the implied warranty of MERCHANTABILITY or FITNESS FOR A PARTICULAR PURPOSE.
  // occursIn FMA:7197 BTO:0000759 ncit:C12392
  // hasProperty ncit:C79371 ncit:C79372 mamo:MAMO_0000046 ncit:C77995 ncit:C180619 ncit:C15299
  // hasTaxon taxonomy:9606 snomedct:337915000
  // isDescribedBy doi:10.20944/preprints202507.1945.v1 doi:10.5281/zenodo.15157735
  // model units - substance: mmole, time: min, volume: litre, area: m2, length: metre, extent: mmole

  // Compartments:
  compartment Vext = 1.5 litre; Vext is "plasma";  // SBO:0000290 ncit:C13356 BTO:0000131
  compartment Vli = 1.5 litre; Vli is "liver";  // SBO:0000290 FMA:7197 BTO:0000759 ncit:C12392
  compartment Vmem = NaN; Vmem has m2; Vmem is "membrane";  // 2-D; SBO:0000290 FMA:84669 GO:0016323
  compartment Vbi = 1 litre; Vbi is "bile";  // SBO:0000290 FMA:62971 ncit:C13192
  compartment Vlumen = 1 litre; Vlumen is "gut lumen";  // SBO:0000290 FMA:45615 BTO:0000545 ncit:C12736

  // Species:
  species riv_ext in Vext = 0; riv_ext is "rivaroxaban (plasma)";  // SBO:0000247 CHEBI:68579 pubchem.compound:9875401 inchikey:KGFYHTZWPPHNLQ-AWEZNQCLSA-N
  species riv in Vli = 0; riv is "rivaroxaban (liver)";  // SBO:0000247 CHEBI:68579 pubchem.compound:9875401 inchikey:KGFYHTZWPPHNLQ-AWEZNQCLSA-N
  species rx_ext in Vli = 0; rx_ext is "rivaroxaban metabolites (plasma)";  // SBO:0000247
  species rx in Vli = 0; rx is "rivaroxaban metabolites (liver)";  // SBO:0000247
  substanceOnly species rx_bi in Vbi = 0; rx_bi is "rivaroxaban metabolites (bile)";  // SBO:0000247
  substanceOnly species rx_lumen in Vlumen = 0; rx_lumen is "rivaroxaban metabolites (gut)";  // SBO:0000247

  // Parameters:
  RXEX_BI_k = 0.0001 per_min; RXEX_BI_k is "rate for rivaroxaban metabolite export in bile";  // SBO:0000009
  RIVIM_Vmax = 1000 per_min; RIVIM_Vmax is "Vmax rivaroxaban import";  // SBO:0000186
  RIV2RX_Vmax = 0.06401213 per_min; RIV2RX_Vmax is "Vmax rivaroxaban conversion";  // SBO:0000186
  RXEX_Vmax = 1000 per_min; RXEX_Vmax is "Vmax rivaroxaban metabolite export";  // SBO:0000186

  // Reactions:
  // Assuming fast equilibration.
  RIVIM: riv_ext -> riv; RIVIM_Vmax*Vli*(riv_ext - riv); RIVIM is "rivaroxaban import (RIVIM)";  // SBO:0000655
  // Combination of multiple enzymes in the liver which create a variet of different metabolites. Not much is known about the conversions of rivaroxaban to its metabolites. [Weinz2009].
  RIV2RX: riv => rx; RIV2RX_Vmax*Vli*riv; RIV2RX is "rivaroxaban conversion (RIV2RX)";  // SBO:0000176
  // Assuming fast equilibration.
  RXEX: rx -> rx_ext; RXEX_Vmax*Vli*(rx - rx_ext); RXEX is "rivaroxaban metabolite export (RXEX)";  // SBO:0000655
  RXEX_BI: rx => rx_bi; RXEX_BI_k*Vli*rx; RXEX_BI is "rivaroxaban metabolite bile export";  // SBO:0000655
  RXEXEHC: rx_bi => rx_lumen; RXEX_BI; RXEXEHC is "rivaroxaban metabolite enterohepatic circulation";  // SBO:0000655

  // Unit definitions:
  unit g_per_mole = gram / mole; g_per_mole is "g/mole";
  unit l_per_min = litre / (60 second); l_per_min is "l/min";
  unit m2 = metre^2; m2 is "meter^2";
  unit mM = 1e-3 mole / litre; mM is "mmole/liter";
  unit mg = 1e-3 gram;
  unit mg_per_s_l = 1e-3 gram / (second * litre); mg_per_s_l is "mg/s/l";
  unit min = 60 second;
  unit min_per_hr = 60 second / (3600 second); min_per_hr is "min/hour";
  unit mmole = 1e-3 mole;
  unit mmole_per_min = 1e-3 mole / (60 second); mmole_per_min is "mmole/min";
  unit mmole_per_min_l = 1e-3 mole / (60 second * litre); mmole_per_min_l is "mmole/min/l";
  unit per_min = 1 / (60 second); per_min is "1/min";
  unit per_mmole = 1 / (1e-3 mole); per_mmole is "1/mmole";
end
